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/batch
! ANSYS input file written by Workbench version 15.0.7  Release
! File used for geometry attach: G:\final ansys\pressure sensor_files\dp0\SYS-1\DM\SYS-1.agdb
/title,pressure sensor--Static Structural (A5)
/com,--- Data in consistent uMKS units.
/units,uMKS
/prep7
! Turn off shape checking because checks already performed inside WB mesher.
! See help system for more information.
SHPP,OFF,,NOWARN
ncnv,1,1e9             ! uMKS system, Increase DOF limit to 1e9
etcon,set             ! allow ANSYS to choose best KEYOP's for 180x elements
/com,*********** Nodes for the whole assembly ***********
nblock,3
(1i9,3e20.9e3)
        1   -3.147108454E+004   -1.504274672E+004   -2.500000000E+004
        2   -3.147108454E+004   -1.504274672E+004   -2.000000000E+004
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-1
/com,*********** Elements for Body 1 "Solid" ***********
et,1,186
keyo,1,2,1          ! set full integration on SOLID186
eblock,19,solid,,296
(19i9)
        1        1        1        1        0        0        0        0       20        0      853     5123     5124     5411     5410     5162     5161     5630     5631
     5791     5796     6635     5793     5910     5912     7102     5915     5792     5795     6638     6636
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-1
/com,*********** Elements for Body 2 "Solid" ***********
et,2,186
keyo,2,2,1          ! set full integration on SOLID186
eblock,19,solid,,852
(19i9)
        2        2        2        2        0        0        0        0       20        0        1      188     1056      942      941      247     1407     1003     1004
     2134     4159     4155     2133     2357     4300     4299     2356     2132     4398     4158     4156
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-1
/com,*********** Elements for Body 3 "Solid" ***********
et,3,186
keyo,3,2,1          ! set full integration on SOLID186
eblock,19,solid,,1768
(19i9)
        3        3        3        3        0        0        0        0       20        0     1149     8864     8986     8987     8865     8955    10587    10586     8954
    15613    15901    15616    15611    15813    19031    15811    15809    15612    15903    15906    15615
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-1
/com,*********** Elements for Body 4 "Solid" ***********
et,4,186
keyo,4,2,1          ! set full integration on SOLID186
eblock,19,solid,,432
(19i9)
        4        4        4        4        0        0        0        0       20        0     4101    27352    27397    27398    27353    27388    27779    27778    27387
    28837    28964    28840    28835    28944    29716    28943    28941    28836    28966    28969    28839
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-1
/com,*********** Elements for Body 5 "Solid" ***********
et,5,186
keyo,5,2,1          ! set full integration on SOLID186
eblock,19,solid,,1184
(19i9)
        5        5        5        5        0        0        0        0       20        0     2917    20042    20133    20134    20043    20116    21298    21297    20115
    24486    24702    24489    24484    24666    27015    24664    24662    24485    24704    24707    24488
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-1
/com,*********** Send User Defined Coordinate System(s) ***********
csys,0
toffst,273.15,  ! Temperature offset from absolute zero
/com,*********** Set Reference Temperature ***********
tref,22.
/com,*********** Send Materials ***********
MP,DENS,1,1.2e-15,	! kg um^-3
MP,EX,1,500,	! MPa
MP,NUXY,1,0.47,

MP,DENS,2,2.3e-15,	! kg um^-3
MP,EX,2,500,	! MPa
MP,NUXY,2,0.49,

MP,DENS,3,1.208e-15,	! kg um^-3
MP,EX,3,4500,	! MPa
MP,NUXY,3,0.07,

MP,DENS,4,2.7e-15,	! kg um^-3
MP,EX,4,730000,	! MPa
MP,NUXY,4,0.33,

MP,EX,5,0.00214,	! MPa
MP,NUXY,5,0.48,
MP,DENS,5,1.15e-15,	! kg um^-3

!************************* Model Summary ********************
!Solid,	silicon rubber,	matid,	1
!Solid,	si_glass,	matid,	2
!Solid,	polysterene,	matid,	3
!Solid,	aluminium,	matid,	4
!Solid,	nylon,	matid,	5
!************************* End Model Summary ********************
/com,*********** Create Contact "Contact Region" ***********
*set,tid,7
*set,cid,6
r,tid
r,cid
et,tid,170
et,cid,174
eblock,10,,,1496
(15i9)
     4533        7        7        7        0     7438     7440     8883     7463    11327    11331    11377    11328
     4534        7        7        7        0     8839     8915     8916     8882    15537    15732    15665    15536
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-1
eblock,10,,,1496
(15i9)
     6029        6        6        6        0     7438     7440     8883     7463    11327    11331    11377    11328
     6030        6        6        6        0     8839     8915     8916     8882    15537    15732    15665    15536
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-1
eblock,10,,,396
(15i9)
     7525        6        7        6        0    27731    27753    27117    27115    29667    28084    28077    28079
     7526        6        7        6        0    27752    27770    27769    27395    29688    29706    28960    28959
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-1
eblock,10,,,396
(15i9)
     7921        7        6        7        0    27731    27753    27117    27115    29667    28084    28077    28079
     7922        7        6        7        0    27752    27770    27769    27395    29688    29706    28960    28959
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-1
esel,s,type,,6
cm,_AllContacts,elem
keyo,cid,8,2               ! auto create asymmetric contact (from Program Controlled setting)
keyo,cid,10,2              ! adjust contact stiffness each NR iteration (from Program Controlled setting)
keyo,cid,12,5              ! bonded always
keyo,cid,2,0               ! augmented Lagrange (from Program Controlled setting)
keyo,cid,4,0               ! on Gauss point (from Program Controlled setting)
keyo,cid,9,1               ! ignore initial gaps/penetration
keyo,cid,7,0               ! No Prediction
rmod,tid,3,10.	! FKN
rmod,tid,5,0.	! ICONT
rmod,tid,6,0.	! PINB
rmod,tid,10,0.	! CNOF
rmod,tid,12,0.	! FKT
rmod,cid,3,10.	! FKN
rmod,cid,5,0.	! ICONT
rmod,cid,6,0.	! PINB
rmod,cid,10,0.	! CNOF
rmod,cid,12,0.	! FKT
/com,*********** Create Contact "Contact Region 2" ***********
*set,tid,9
*set,cid,8
r,tid
r,cid
et,tid,170
et,cid,174
eblock,10,,,252
(15i9)
     8317        9        9        9        0    27133    27135    27365    27143    28125    28129    28145    28126
     8318        9        9        9        0    27351    27381    27382    27364    28833    28925    28874    28832
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-1
eblock,10,,,252
(15i9)
     8569        8        8        8        0    27133    27135    27365    27143    28125    28129    28145    28126
     8570        8        8        8        0    27351    27381    27382    27364    28833    28925    28874    28832
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-1
eblock,10,,,1184
(15i9)
     8821        8        9        8        0    21216    21248    19050    19048    26932    21363    21356    21358
     8822        8        9        8        0    21247    21284    21283    20131    26963    27000    24698    24697
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-1
eblock,10,,,1184
(15i9)
    10005        9        8        9        0    21216    21248    19050    19048    26932    21363    21356    21358
    10006        9        8        9        0    21247    21284    21283    20131    26963    27000    24698    24697
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-1
esel,s,type,,8
cm,contactElems41,elem
cmsel,a,_AllContacts,elem
cm,_AllContacts,elem
cmsel,s,contactElems41,elem
cmdele,contactElems41
keyo,cid,8,2               ! auto create asymmetric contact (from Program Controlled setting)
keyo,cid,10,2              ! adjust contact stiffness each NR iteration (from Program Controlled setting)
keyo,cid,12,5              ! bonded always
keyo,cid,2,0               ! augmented Lagrange (from Program Controlled setting)
keyo,cid,4,0               ! on Gauss point (from Program Controlled setting)
keyo,cid,9,1               ! ignore initial gaps/penetration
keyo,cid,7,0               ! No Prediction
rmod,tid,3,10.	! FKN
rmod,tid,5,0.	! ICONT
rmod,tid,6,0.	! PINB
rmod,tid,10,0.	! CNOF
rmod,tid,12,0.	! FKT
rmod,cid,3,10.	! FKN
rmod,cid,5,0.	! ICONT
rmod,cid,6,0.	! PINB
rmod,cid,10,0.	! CNOF
rmod,cid,12,0.	! FKT
nsel,all
esel,all
/com,*********** Fixed Supports ***********
CMBLOCK,_FIXEDSU,NODE,      208
(8i10)
     27099     27100     27101     27102     27103     27104     27105     27106
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
cmsel,s,_FIXEDSU
d,all,all
nsel,all
nsel,all
/com,*********** Define Pressure Using Surface Effect Elements ***********
et,10,154
eblock,10,,,288
(15i9)
    11189       10       10       10        0     5190     5153     5154     5155     5889     5887     5891     5893
    11190       10       10       10        0     5672     5674     5147     5400     7159     5866     5864     6615
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-1
esel,s,type,,10
esel,all

*DIM,_loadvari128,TABLE,2,1,1,TIME,
! Time values
_loadvari128(1,0,1) = 0.
_loadvari128(2,0,1) = 1.
! Load values
_loadvari128(1,1,1) = 0.
_loadvari128(2,1,1) = 1.

esel,all
fini
/com,****************************************************************************
/com,*************************    SOLUTION       ********************************
/com,****************************************************************************
/solu
antype,0                   ! static analysis
neqit,1,force              ! Force 1 eq iteration since only nonlinearity is bonded/no sep contact
pred,off
eqsl,sparse,,,,,1
cntr,print,1               ! print out contact info and also make no initial contact an error
nldiag,cont,iter           ! print out contact info each equilibrium iteration
resc,,none                 ! Do not keep any restart files
/com,****************************************************
/com,******************* SOLVE FOR LS 1 ****************
esel,s,type,,10
nsle
sf,all,pres,%_loadvari128%
nsel,all
esel,all
esel,all
nsub,1,1,1
time,1.
outres,erase
outres,all,none
outres,nsol,all
outres,rsol,all
outres,strs,all
outres,epel,all
outres,eppl,all
stabilize,off                   ! Stabilization turned OFF by user
! *********** WB SOLVE COMMAND ***********
! check interactive state
*get,ANSINTER_,active,,int
*if,ANSINTER_,ne,0,then
/eof
*endif
solve
/com *************** Write FE CONNECTORS *********
CEWRITE,file,ce,,INTE
/com,****************************************************
/com,*************** FINISHED SOLVE FOR LS 1 *************
*set,_DS_PROGRESS          ! turn off progress updates to avoid virus scanning bug
/post1
fini
